g(x_1) := 16*x_1
h(x_1, x_2) := x_1^2 - 1*16*x_1 + x_2^2
h_max := h(1, 15) = 210
Rmin := 5*sin(atan(15)) = 4.98893
h_min := Rmin^2 - 25 = -0.110619
h(x_1) := x_1^2 - 1*16*x_1 + (16*x_1)^2
p := 0
Given
h(p) == h_min
p_1 := Find(p) = 0.00792169
p_2 := g(p_1) = 0.126747
y(kl_1, k2_1, k1_2, k2_2, x) := (k2_2 - k2_1)/(k1_2 - kl_1)*x + (k1_2*k2_1 - kl_1*k2_2)/(k1_2 - kl_1)
Rmax(x_1) := y(1, 16, 16, 0, x_1)
Rmin(x_1) := y(7.922*10^-3, 0.127, 16, 0, x_1)
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