# 1. Задаємо координати споживачів та їх потреби за допомогою матриць-векторів X, Y, Q:
a := 0
b := 10
ORIGIN := 1
X := [4; 10; 2; 3; 6; 7; 2; 8; 5; 8]
Y := [9; 1; 7; 3; 4; 7; 2; 5; 2; 4]
Q := [1; 3; 5; 5; 5; 2; 3; 4; 5; 2]
n := length(X) = 10
transpose(augment(X, Y)) = [4, 10, 2, 3, 6, 7, 2, 8, 5, 8; 9, 1, 7, 3, 4, 7, 2, 5, 2, 4]
# 2. Визначити координати початкового положення складу:
R(x, y) := sum(sqrt((x - X[j])^2 + (y - Y[j])^2), j = 1 .. n)
# 3. Уточнити положення складу за методом умовного центру мас:
x := 0
y := 0
Given
R(x, y) == 0
[x_c0; y_c0] := Minerr(x, y)
[x_c0; y_c0] = [6; 4]
x_c := sum(vectorize(X*Q))/sum(Q) = 5.2
y_c := sum(vectorize(Y*Q))/sum(Q) = 4
# 4. Побудувати в одній координатній площині положення всіх споживачів і складу:
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